D,991,UX,0,,,, UY,UZ
D,1043,UX,0,,,, UY,UZ
D,1114,UX,0,,,, UY,UZ
D,1120,UX,0,,,, UY,UZ
D,1319,UX,0,,,, UY,UZ
D,1420,UX,0,,,, UY,UZ
/SOLU
ANTYPE, STATIC
F,156,FY,-24500
F,163,FY,-24500

ALLSEL
SOLVE
/POST1
PLNSOL,U,SUM,0
