! ----------------------------------------------------------------------
!
! Course: ME364
! Project: Structure Analysis of Gantry
! Analysed by: Du Xi
! Date:
! Director:
! ----------------------------------------------------------------------

FINISH
/CLEAR
/FILNAME, FILE_NAME, ON
/TITLE, PROJECT_NAME
/PREP7
/GLINE, , -1

! Define Material Properties, Unit: kg/mm/N
! ----------------------------------------------------------------------
MP, EX,   1, 2.1E5
MP, PRXY, 1, 0.3
MP, DENS, 1, 7.8E-6

! Define Element Type
! ----------------------------------------------------------------------
ET, 1, BEAM4
... ...

! Define Real Constant
! ----------------------------------------------------------------------

! MODEL
! ----------------------------------------------------------------------

! Define local coordinate
! ----------------------------------------------------------------------
K, 3000,    0,    0,    0
K, 3001,    0, 1000,    0
K, 3002,    0,    0, 1000
K, 3003, 1000,    0,    0
CSKP, 11, CYLIN, 3000, 3001, 3002

! ASSEMBLY_1
! ----------------------------------------------------------------------
NUMSTR, KP, 101
NUMSTR, LINE, 101
NUMSTR, AREA, 101
CSYS, 11
K, 100, 320, , -23
... ...

! ASSEMBLY_2
! ----------------------------------------------------------------------
NUMSTR, KP, 501
NUMSTR, LINE, 501
NUMSTR, AREA, 501
CSYS, 11
K, 150, 300, , 676
... ...

! Mesh
! ----------------------------------------------------------------------

! ASSEMBLY_1
! ----------------------------------------------------------------------
ALLSEL
... ...

! ASSEMBLY_2
! ----------------------------------------------------------------------
ALLSEL

! Boundary Condition
!-----------------------------------------------------------------------
ALLSEL

! Solve
!-----------------------------------------------------------------------
/SOLU
ANTYPE, STATIC
ACEL, 9.8

! Load
!-----------------------------------------------------------------------


ALLSEL
SOLVE
/EOF
